// COMSOL Multiphysics 5.0.0.243 model "Laminar_Tube_HTC.mph"
// Outline of the model tree

Parameters
  L = 3[m]  // Length
  b = 0.05[m]  // Diameter
  T0 = 283[K]  // Inlet temperature
  U_av = 0.1[m/s]  // 0.1 m/s Average inlet velocity
  qw = 10[W/m^2]  // 10 W/m² Wall heat flux
  Tw = 293[K]  // Wall temperature

Variables
  var1 "Variables 1"
    U = 1.5*U_av*(1-4*(r/b)^2)  // Inlet velocity
    Tb = integrate(comp1.at2(r,z,2*pi*r*w*T),r,0,b/2)/integrate(comp1.at2(r,z,2*pi*r*w),r,0,b/2)  // Bulk temperature
    Ub = integrate(comp1.at2(r,z,2*pi*r*w),r,0,b/2)/(pi*(b/2)^2)  // Bulk velocity
    Tc = comp1.at2(0,z,T)  // Center line temperature
    Pr = ht.Cp*spf.mu/ht.kmean  // Prandtl number
    Re_D = nitf1.rho*Ub*b/spf.mu  // Reynolds number
    Gz = b*Re_D*Pr/z*pi/4  // Graetz number
    Nu_D = (1+(Gz/19.04/((1+(Pr/0.0207)^2/3)^1/2*(1+(Gz/29.6)^2)^1/3))^(3/2))^(1/3)*4.364*(1+(Gz/29.6)^2)^(1/6)  // Local Nusselt number
    rho = p*0.02897[kg/mol]/8.314[J/(mol*K)]/T

Geometry
  geom1 "Geometry 1" (2D axisymmetric, length unit m)
    r1: Rectangle | size = {b/2, L}
    fin: Finalize "Form Union"

Materials
  mat1: Common "Air [gas]"
    def "Basic"
      thermalconductivity = k(T[1/K])[W/(m*K)]
      heatcapacity = C(T[1/K])[J/(kg*K)]
      density = rho_gas_2(T[1/K])[kg/m^3]
      TD = TD(T[1/K])[m^2/s]
      dynamicviscosity = eta(T[1/K])[Pa*s]
      k: Piecewise | arg = T; extrap = constant; pieces = {70.0, 1000.0, -8.404165E-4+1.107418E-4*T^1-8.635537E-8*T^2+6.31411E-11*T^3-1.88168E-14*T^4}
      C: Piecewise
        arg = T
        extrap = constant
        pieces = 
          {100.0, 375.0, 1010.97+0.0439479*T^1-2.922398E-4*T^2+6.503467E-7*T^3}
          {375.0, 1300.0, 1093.29-0.6355521*T^1+0.001633992*T^2-1.412935E-6*T^3+5.59492E-10*T^4-8.663072E-14*T^5}
          {1300.0, 3000.0, 701.0807+0.8493867*T^1-5.846487E-4*T^2+2.302436E-7*T^3-4.846758E-11*T^4+4.23502E-15*T^5}
      rho_gas_2: Piecewise "Piecewise 2a" | arg = T; extrap = constant; pieces = {80.0, 3000.0, 352.716*T^-1}
      TD: Piecewise
        arg = T
        extrap = constant
        pieces = 
          {300.0, 753.0, 1.713214E-4-1.204913E-6*T^1+2.839046E-9*T^2-1.532799E-12*T^3}
          {753.0, 873.0, 0.00416418-1.191227E-5*T^1+8.863636E-9*T^2}
      eta: Piecewise
        arg = T
        extrap = constant
        pieces = 
          {120.0, 600.0, -1.132275E-7+7.94333E-8*T^1-7.197989E-11*T^2+5.158693E-14*T^3-1.592472E-17*T^4}
          {600.0, 2150.0, 3.892629E-6+5.75387E-8*T^1-2.675811E-11*T^2+9.709691E-15*T^3-1.355541E-18*T^4}
  mat2: Common "air" on all domains
    def "Basic"
      dynamicviscosity = 1.82e-5
      thermalconductivity = 0.0257
      density = 1.204
      heatcapacity = 1005
      ratioofspecificheat = 1.4

Physics
  spf: LaminarFlow on all domains
    dependent variable u = {u, v, w}
    AdvancedSettingProperty.UsePseudoTime = 1
    fp1: FluidProperties (default)
    axi1: AxialSymmetry (default)
    wall1: Wall (default)
    init1: init "Initial Values 1" (default)
    inl1: InletBoundary "Inlet 1" on boundaries 2 | ComponentWise = NormalInflowVelocity; U0in = U
    out1: OutletBoundary "Outlet 1" on boundaries 3
  ht: HeatTransferInFluids on all domains
    dependent variable T
    ShapeProperty.order_temperature = 1
    fluid1: FluidHeatTransferModel "Heat Transfer in Fluids 1" (default) | rho_mat = from_mat
    init1: init "Initial Values 1" (default)
    axi1: AxialSymmetry (default)
    ins1: ThermalInsulation (default)
    ofl1: ConvectiveOutflow "Outflow 1" on boundaries 3
    hf1: HeatFluxBoundary "Heat Flux 1" on boundaries 4 | q0 = qw
    temp1: TemperatureBoundary "Inflow" on boundaries 2 | T0 = T0

Multiphysics
  nitf1: NonIsothermalFlow on all domains | Fluid_physics = spf; Heat_physics = ht

Mesh
  mesh1 "Mesh 1" (physics-controlled)
    size: MeshSizeDefault | table = cfd; hauto = 6

Studies
  std1 "Study 1"
    stat: Stationary

Solver configurations
  sol1 "Solution 1" (study std1)
    v1: Variables "Dependent Variables 1"
    s1: Stationary "Stationary Solver 1"
      se1: Segregated
        maxsegiter = 200
        segstabacc = segcflcmp
        subinitcfl = 5
        subkppid = 0.65
        subkdpid = 0.05
        subkipid = 0.05
        subcfltol = 0.1
        ss1: SegregatedStep | segvar = {comp1_u, comp1_p}; linsolver = d1; subdamp = 0.5
        ss2: SegregatedStep | segvar = {comp1_T}; linsolver = d2; subdamp = 0.8
      d1: Direct | linsolver = pardiso
      d2: Direct | linsolver = pardiso

Datasets
  dset1: Solution | solution = sol1
  rev1: Revolve2D "Revolution 2D 1" | data = dset1; genpoints = {{0, 0}, {0, 1}}; startangle = -90; revangle = 225
  rev2: Revolve2D "Revolution 2D 2"
    data = dset1
    genpoints = {{0, 0}, {0, 1}}
    startangle = -90
    revangle = 225
    spacevars = {rev1x, rev1y, rev1z}
    anglevar = rev1phi

Plots
  pg1: PlotGroup2D "Velocity (spf)" | data = dset1
    surf1: Surface | expr = spf.U
  pg2: PlotGroup2D "Pressure (spf)" | data = dset1
    con1: Contour | expr = p
  pg3: PlotGroup3D "Velocity (spf) 1" | data = rev1
    surf1: Surface | expr = spf.U
  pg4: PlotGroup3D "Temperature, 3D (ht)" | data = rev2
    surf1: Surface | expr = T
  pg5: PlotGroup2D "Isothermal Contours (ht)" | data = dset1
    con1: Contour | expr = T